<?xml version="1.0"?>
  <aerodynamics>
    <axis name="LIFT">
      <function name="aero/lift/alpha">
          <product>
              <property>aero/qbar-psf</property>
              <property>metrics/Sw-sqft</property>
              <table>
                  <independentVar lookup="row">aero/alpha-rad</independentVar>
                  <tableData>-3.141593 0.000000
-3.106686 0.002434
-3.071779 0.009708
-2.792527 0.219846
-2.513274 0.559017
-2.234021 0.764603
-1.954769 0.644076
-1.675516 0.206773
-1.396263 -0.336825
-1.117011 -0.708300
-0.837758 -0.740942
-0.558505 -0.554291
-0.279253 -0.929445
0.000000 0.150021
0.279253 1.145280
0.558505 0.565196
0.837758 0.741114
1.117011 0.708303
1.396263 0.336825
1.675516 -0.206773
1.954769 -0.644076
2.234021 -0.764603
2.513274 -0.559017
2.792527 -0.219846
3.071779 -0.009708
3.106686 -0.002434
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3.141593 -0.000000</tableData>
              </table>
          </product>
      </function>
      <function name="aero/lift/q">
          <product>
              <property>aero/qbar-psf</property>
              <property>metrics/Sw-sqft</property>
              <property>velocities/q-aero-rad_sec</property>
              <property>aero/ci2vel</property>
              <value>7.971792</value>
          </product>
      </function>
      <function name="aero/lift/servo_0">
          <product>
              <property>aero/qbar-psf</property>
              <property>metrics/Sw-sqft</property>
              <property>fcs/servo-0-pos-deg</property>
              <value>-0.01194</value>
          </product>
      </function>
      <function name="aero/lift/servo_1">
          <product>
              <property>aero/qbar-psf</property>
              <property>metrics/Sw-sqft</property>
              <property>fcs/servo-1-pos-deg</property>
              <value>-0.01194</value>
          </product>
      </function>
      <function name="aero/lift/servo_2">
          <product>
              <property>aero/qbar-psf</property>
              <property>metrics/Sw-sqft</property>
              <property>fcs/servo-2-pos-deg</property>
              <value>-0.010696</value>
          </product>
      </function>
    </axis>
    <axis name="DRAG">
      <function name="aero/drag/alpha">
          <product>
              <property>aero/qbar-psf</property>
              <property>metrics/Sw-sqft</property>
              <table>
                  <independentVar lookup="row">aero/alpha-rad</independentVar>
                  <tableData>-3.141593 0.000000
-3.106686 0.001767
-3.071779 0.007060
-2.792527 0.169716
-2.513274 0.501252
-2.234021 0.900913
-1.954769 1.247241
-1.675516 1.434985
-1.396263 1.407088
-1.117011 1.172021
-0.837758 0.800825
-0.558505 0.394387
-0.279253 0.083501
0.000000 0.029767
0.279253 0.099564
0.558505 0.394410
0.837758 0.800825
1.117011 1.172021
1.396263 1.407088
1.675516 1.434985
1.954769 1.247241
2.234021 0.900913
2.513274 0.501252
2.792527 0.169716
3.071779 0.007060
3.106686 0.001767
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3.141593 0.000000</tableData>
              </table>
          </product>
      </function>
      <function name="aero/drag/q">
          <product>
              <property>aero/qbar-psf</property>
              <property>metrics/Sw-sqft</property>
              <property>velocities/q-aero-rad_sec</property>
              <property>aero/ci2vel</property>
              <value>0.055166</value>
          </product>
      </function>
      <function name="aero/drag/servo_0">
          <product>
              <property>aero/qbar-psf</property>
              <property>metrics/Sw-sqft</property>
              <property>fcs/servo-0-pos-deg</property>
              <value>-5.9e-05</value>
          </product>
      </function>
      <function name="aero/drag/servo_1">
          <product>
              <property>aero/qbar-psf</property>
              <property>metrics/Sw-sqft</property>
              <property>fcs/servo-1-pos-deg</property>
              <value>-5.9e-05</value>
          </product>
      </function>
      <function name="aero/drag/servo_2">
          <product>
              <property>aero/qbar-psf</property>
              <property>metrics/Sw-sqft</property>
              <property>fcs/servo-2-pos-deg</property>
              <value>-0.000274</value>
          </product>
      </function>
    </axis>
    <axis name="SIDE">
      <function name="aero/side/beta">
          <product>
              <property>aero/qbar-psf</property>
              <property>metrics/Sw-sqft</property>
              <property>aero/beta-rad</property>
              <value>-0.258244</value>
          </product>
      </function>
      <function name="aero/side/p">
          <product>
              <property>aero/qbar-psf</property>
              <property>metrics/Sw-sqft</property>
              <property>velocities/p-aero-rad_sec</property>
              <property>aero/bi2vel</property>
              <value>0.065861</value>
          </product>
      </function>
      <function name="aero/side/r">
          <product>
              <property>aero/qbar-psf</property>
              <property>metrics/Sw-sqft</property>
              <property>velocities/r-aero-rad_sec</property>
              <property>aero/bi2vel</property>
              <value>0.230299</value>
          </product>
      </function>
      <function name="aero/side/servo_0">
          <product>
              <property>aero/qbar-psf</property>
              <property>metrics/Sw-sqft</property>
              <property>fcs/servo-0-pos-deg</property>
              <value>0.000171</value>
          </product>
      </function>
      <function name="aero/side/servo_1">
          <product>
              <property>aero/qbar-psf</property>
              <property>metrics/Sw-sqft</property>
              <property>fcs/servo-1-pos-deg</property>
              <value>-0.000171</value>
          </product>
      </function>
      <function name="aero/side/servo_3">
          <product>
              <property>aero/qbar-psf</property>
              <property>metrics/Sw-sqft</property>
              <property>fcs/servo-3-pos-deg</property>
              <value>-0.003913</value>
          </product>
      </function>
    </axis>
    <axis name="ROLL">
      <function name="aero/roll/beta">
          <product>
              <property>aero/qbar-psf</property>
              <property>metrics/Sw-sqft</property>
              <property>metrics/bw-ft</property>
              <property>aero/beta-rad</property>
              <value>-0.03925</value>
          </product>
      </function>
      <function name="aero/roll/p">
          <product>
              <property>aero/qbar-psf</property>
              <property>metrics/Sw-sqft</property>
              <property>metrics/bw-ft</property>
              <property>velocities/p-aero-rad_sec</property>
              <property>aero/bi2vel</property>
              <value>-0.487407</value>
          </product>
      </function>
      <function name="aero/roll/r">
          <product>
              <property>aero/qbar-psf</property>
              <property>metrics/Sw-sqft</property>
              <property>metrics/bw-ft</property>
              <property>velocities/r-aero-rad_sec</property>
              <property>aero/bi2vel</property>
              <value>0.078165</value>
          </product>
      </function>
      <function name="aero/roll/servo_0">
          <product>
              <property>aero/qbar-psf</property>
              <property>metrics/Sw-sqft</property>
              <property>metrics/bw-ft</property>
              <property>fcs/servo-0-pos-deg</property>
              <value>-0.003331</value>
          </product>
      </function>
      <function name="aero/roll/servo_1">
          <product>
              <property>aero/qbar-psf</property>
              <property>metrics/Sw-sqft</property>
              <property>metrics/bw-ft</property>
              <property>fcs/servo-1-pos-deg</property>
              <value>0.003331</value>
          </product>
      </function>
      <function name="aero/roll/servo_3">
          <product>
              <property>aero/qbar-psf</property>
              <property>metrics/Sw-sqft</property>
              <property>metrics/bw-ft</property>
              <property>fcs/servo-3-pos-deg</property>
              <value>-0.000257</value>
          </product>
      </function>
    </axis>
    <axis name="PITCH">
      <function name="aero/pitch/alpha">
          <product>
              <property>aero/qbar-psf</property>
              <property>metrics/Sw-sqft</property>
              <property>metrics/cbarw-ft</property>
              <table>
                  <independentVar lookup="row">aero/alpha-rad</independentVar>
                  <tableData>-3.141593 0.232351
-3.106686 0.232351
-3.071779 0.232351
-2.792527 0.232351
-2.513274 0.232351
-2.234021 0.232351
-1.954769 0.232351
-1.675516 0.232351
-1.396263 0.232351
-1.117011 0.232351
-0.837758 0.232351
-0.558505 0.232351
-0.279253 0.204564
0.000000 0.075000
0.279253 -0.054564
0.558505 -0.082351
0.837758 -0.082351
1.117011 -0.082351
1.396263 -0.082351
1.675516 -0.082351
1.954769 -0.082351
2.234021 -0.082351
2.513274 -0.082351
2.792527 -0.082351
3.071779 -0.082351
3.106686 -0.082351
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3.141593 -0.082351</tableData>
              </table>
          </product>
      </function>
      <function name="aero/pitch/q">
          <product>
              <property>aero/qbar-psf</property>
              <property>metrics/Sw-sqft</property>
              <property>metrics/cbarw-ft</property>
              <property>velocities/q-aero-rad_sec</property>
              <property>aero/ci2vel</property>
              <value>-12.14014</value>
          </product>
      </function>
      <function name="aero/pitch/servo_0">
          <product>
              <property>aero/qbar-psf</property>
              <property>metrics/Sw-sqft</property>
              <property>metrics/cbarw-ft</property>
              <property>fcs/servo-0-pos-deg</property>
              <value>0.001498</value>
          </product>
      </function>
      <function name="aero/pitch/servo_1">
          <product>
              <property>aero/qbar-psf</property>
              <property>metrics/Sw-sqft</property>
              <property>metrics/cbarw-ft</property>
              <property>fcs/servo-1-pos-deg</property>
              <value>0.001498</value>
          </product>
      </function>
      <function name="aero/pitch/servo_2">
          <product>
              <property>aero/qbar-psf</property>
              <property>metrics/Sw-sqft</property>
              <property>metrics/cbarw-ft</property>
              <property>fcs/servo-2-pos-deg</property>
              <value>0.025798</value>
          </product>
      </function>
    </axis>
    <axis name="YAW">
      <function name="aero/yaw/beta">
          <product>
              <property>aero/qbar-psf</property>
              <property>metrics/Sw-sqft</property>
              <property>metrics/bw-ft</property>
              <property>aero/beta-rad</property>
              <value>0.100826</value>
          </product>
      </function>
      <function name="aero/yaw/p">
          <product>
              <property>aero/qbar-psf</property>
              <property>metrics/Sw-sqft</property>
              <property>metrics/bw-ft</property>
              <property>velocities/p-aero-rad_sec</property>
              <property>aero/bi2vel</property>
              <value>-0.040416</value>
          </product>
      </function>
      <function name="aero/yaw/r">
          <product>
              <property>aero/qbar-psf</property>
              <property>metrics/Sw-sqft</property>
              <property>metrics/bw-ft</property>
              <property>velocities/r-aero-rad_sec</property>
              <property>aero/bi2vel</property>
              <value>-0.089947</value>
          </product>
      </function>
      <function name="aero/yaw/servo_0">
          <product>
              <property>aero/qbar-psf</property>
              <property>metrics/Sw-sqft</property>
              <property>metrics/bw-ft</property>
              <property>fcs/servo-0-pos-deg</property>
              <value>-5.7e-05</value>
          </product>
      </function>
      <function name="aero/yaw/servo_1">
          <product>
              <property>aero/qbar-psf</property>
              <property>metrics/Sw-sqft</property>
              <property>metrics/bw-ft</property>
              <property>fcs/servo-1-pos-deg</property>
              <value>5.7e-05</value>
          </product>
      </function>
      <function name="aero/yaw/servo_3">
          <product>
              <property>aero/qbar-psf</property>
              <property>metrics/Sw-sqft</property>
              <property>metrics/bw-ft</property>
              <property>fcs/servo-3-pos-deg</property>
              <value>0.001613</value>
          </product>
      </function>
    </axis>
  </aerodynamics>
