<?xml version="1.0"?>
<?xml-stylesheet type="text/xsl" href="http://jsbsim.sourceforge.net/JSBSim.xsl"?>
<fdm_config name="c172" version="2.0" release="BETA"
    xmlns:xsi="http://www.w3.org/2001/XMLSchema-instance"
    xsi:noNamespaceSchemaLocation="http://jsbsim.sourceforge.net/JSBSim.xsd">

    <fileheader>
        <author> Unknown </author>
        <filecreationdate>2002-01-01</filecreationdate>
        <version> $Id: c172p.xml,v 1.29 2013/10/25 15:32:49 jentron Exp $ </version>
        <description> Cessna C-172 </description>
      <note>
        This model was created using publicly available data, publicly available
        technical reports, textbooks, and guesses. It contains no proprietary or
        restricted data. If this model has been validated at all, it would be
        only to the extent that it seems to "fly right", and that it possibly
        complies with published, publicly known, performance data (maximum speed,
        endurance, etc.). Thus, this model is meant for educational and entertainment
        purposes only.

        This simulation model is not endorsed by the manufacturer. This model is not
        to be sold.
      </note>
    </fileheader>

    <metrics file="Metrics.xml"/>
    <mass_balance file="Mass.xml"/>
    <ground_reactions file="Gear.xml"/>
    <propulsion file="Propulsion.xml"/>
    <flight_control file="FlightControl.xml"/>
    <aerodynamics file="Aero.xml"/>
</fdm_config>
